#if IncludeRight == 1
   #if IncludeHip == 1
      AnyDesVar RPelvisHipJointZPos = {
        Val = .ModelRef.Trunk.Seg.Pelvis.RHipJoint.sRel[2];
      };
      AnyDesVar RThighHipJointZPos =  {
        Val = .ModelRef.Right.Seg.Thigh.HipJoint.sRel[2];
      };
   #endif
#endif


#if IncludeLeft == 1
   #if IncludeHip == 1
      AnyDesVar LPelvisHipJointZPos = {
        Val = .ModelRef.Trunk.Seg.Pelvis.LHipJoint.sRel[2];
      };
      AnyDesVar LThighHipJointZPos =  {
        Val = .ModelRef.Left.Seg.Thigh.HipJoint.sRel[2];
      };
    #endif
#endif
