AnyFolder JointAngleOutputs = {

  #if IncludeHip == 1

  AnyOutputFile OutputFile1 = {
    FileName = Main.ModelSetup.Files.OptimizedMotionTrunk ;
    SepSign = " ";

    AnyVector PelvisPosX = ...LegModel.Interface.Trunk.PelvisDriveNodePosX.Pos;
    AnyVector PelvisPosY = ...LegModel.Interface.Trunk.PelvisDriveNodePosY.Pos;
    AnyVector PelvisPosZ = ...LegModel.Interface.Trunk.PelvisDriveNodePosZ.Pos;
    AnyVector PelvisRot0 = ...LegModel.Interface.Trunk.PelvisDriveNodeRot0.Pos;
    AnyVector PelvisRot1 = ...LegModel.Interface.Trunk.PelvisDriveNodeRot1.Pos;
    AnyVector PelvisRot2 = ...LegModel.Interface.Trunk.PelvisDriveNodeRot2.Pos;
  };
  #endif


  #if IncludeLeft + IncludeHip + IncludeKnee + IncludeAnkle == 4

  AnyOutputFile OutputFile2 = {
    FileName =  Main.ModelSetup.Files.OptimizedMotionLeftLegTD ;
    SepSign = " ";

    AnyVector HipMeasure0 = ...LegModel.Interface.Left.HipJointMeasure0.Pos;
    AnyVector HipMeasure1 = ...LegModel.Interface.Left.HipJointMeasure1.Pos;
    AnyVector HipMeasure2 = ...LegModel.Interface.Left.HipJointMeasure2.Pos;
    AnyVector KneeJointMeasure = ...LegModel.Interface.Left.KneeJointMeasure.Pos;
    AnyVector AnkleJointMeasure = ...LegModel.Interface.Left.AnkleJointMeasure.Pos;
    AnyVector SubtalarMeasure = ...LegModel.Interface.Left.SubtalarJointMeasure.Pos;
  };

  #endif


  #if IncludeRight + IncludeHip + IncludeKnee + IncludeAnkle == 4


  AnyOutputFile OutputFile3 = {
    FileName =  Main.ModelSetup.Files.OptimizedMotionRightLegTD ;
    SepSign = " ";

    AnyVector HipMeasure0 = ...LegModel.Interface.Right.HipJointMeasure0.Pos;
    AnyVector HipMeasure1 = ...LegModel.Interface.Right.HipJointMeasure1.Pos;
    AnyVector HipMeasure2 = ...LegModel.Interface.Right.HipJointMeasure2.Pos;
    AnyVector KneeJointMeasure = ...LegModel.Interface.Right.KneeJointMeasure.Pos;
    AnyVector AnkleJointMeasure = ...LegModel.Interface.Right.AnkleJointMeasure.Pos;
    AnyVector SubtalarMeasure = ...LegModel.Interface.Right.SubtalarJointMeasure.Pos;
  };

  #endif


}; //JointAngleOutputs
